h := 958
w := 1918
p0x := 379
p1x := 1300
p2x := 1805
p3x := 825
[33; h - 133]
p0y := h - 763
p1y := h - 886
p2y := h - 10
p3y := h - 443
delta := 50
vit_rads := 1/180.0*3.14
plate_vit := [33; h - 133]
l := 15
# ИНВЕРСИЯ УГЛА в левом случае!
lenght := 302.16
origin := 600
gamma := 2*π - vit_rads = 6.26574
intersect2lines(x1, y1, x2, y2, x3, y3, x4, y4) := a ← [
    ((x2*y1 - x1*y2)*(x4 - x3) - (x4*y3 - x3*y4)*(x2 - x1))/((x2 - x1)*(y4 - y3) - (x4 - x3)*(y2 - y1));
    ((x2*y1 - x1*y2)*(y4 - y3) - (x4*y3 - x3*y4)*(y2 - y1))/((x2 - x1)*(y4 - y3) - (x4 - x3)*(y2 - y1))
]
vp1 := intersect2lines(p0x, p0y, p3x, p3y, p1x, p1y, p2x, p2y)
vp1 = [2070.58; 1408.69]
l1(d) := (d - p0x)*(p3y - p0y)/(p3x - p0x) + p0y
l2(d) := (d - p2x)*(p1y - p2y)/(p1x - p2x) + p2y
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vp2 := [
    ((l*(2*sin(gamma/2)^2 - 1) - plate_vit[0])*plate_vit[1] + (plate_vit[1] + l*sin(gamma))*plate_vit[0] + l*((p0y - p3y)*(p1x*p2y - p1y*p2x) - (p1y - p2y)*(p0x*p3y - p0y*p3x))*(2*sin(gamma/2)^2 - 1)/((p0x - p3x)*(p1y - p2y) - (p1x - p2x)*(p0y - p3y)))/(l*sin(gamma));
    -((p0y - p3y)*(p1x*p2y - p1y*p2x) - (p1y - p2y)*(p0x*p3y - p0y*p3x))/((p0x - p3x)*(p1y - p2y) - (p1x - p2x)*(p0y - p3y))
]
vp2 = [-33423.5; 1408.69]
# проверка на выход за пределы кадра :
w1 := w - delta
h1 := h - delta
l_max_p3x(origin) := -((p0x*p3y - p0y*p3x)*((origin*p1x - origin*p2x - p1x*p2y + p1y*p2x)/(p1y - p2y) - vp2[0]) + (p0x - p3x)*(origin*vp2[0] - vp2[1]*(origin*p1x - origin*p2x - p1x*p2y + p1y*p2x)/(p1y - p2y)) + w1*((p0y - p3y)*((origin*p1x - origin*p2x - p1x*p2y + p1y*p2x)/(p1y - p2y) - vp2[0]) - (p0x - p3x)*(origin - vp2[1])))/(w1*(p3x - p0x + (p1x - p2x)*(p0y - p3y)/(p1y - p2y)) + (vp2[0] - (p1x - p2x)*vp2[1]/(p1y - p2y))*(p0x - p3x) + (p1x - p2x)*(p0x*p3y - p0y*p3x)/(p1y - p2y))
l_min_p3x(origin) := -((p0x*p3y - p0y*p3x)*((origin*p1x - origin*p2x - p1x*p2y + p1y*p2x)/(p1y - p2y) - vp2[0]) + (p0x - p3x)*(origin*vp2[0] - vp2[1]*(origin*p1x - origin*p2x - p1x*p2y + p1y*p2x)/(p1y - p2y)))/((vp2[0] - (p1x - p2x)*vp2[1]/(p1y - p2y))*(p0x - p3x) + (p1x - p2x)*(p0x*p3y - p0y*p3x)/(p1y - p2y))
l_max_p3y(origin) := -((p0y - p3y)*(origin*vp2[0] - vp2[1]*(origin*p1x - origin*p2x - p1x*p2y + p1y*p2x)/(p1y - p2y)) + (p0x*p3y - p0y*p3x)*(origin - vp2[1]) + h1*((p0y - p3y)*((origin*p1x - origin*p2x - p1x*p2y + p1y*p2x)/(p1y - p2y) - vp2[0]) - (p0x - p3x)*(origin - vp2[1])))/(h1*(p3x - p0x + (p1x - p2x)*(p0y - p3y)/(p1y - p2y)) + (vp2[0] - (p1x - p2x)*vp2[1]/(p1y - p2y))*(p0y - p3y) + p0x*p3y - p0y*p3x)
l_min_p3y(origin) := -((p0y - p3y)*(origin*vp2[0] - vp2[1]*(origin*p1x - origin*p2x - p1x*p2y + p1y*p2x)/(p1y - p2y)) + (p0x*p3y - p0y*p3x)*(origin - vp2[1]))/((vp2[0] - (p1x - p2x)*vp2[1]/(p1y - p2y))*(p0y - p3y) + p0x*p3y - p0y*p3x)
len2LOW(origin) := (p1x*p2y - p1y*p2x)/(p1x - p2x) - origin
len2UP(origin) := (p1x*p2y - p1y*p2x + p1y*w1 - p2y*w1)/(p1x - p2x) - origin
# p0 условие максимума
origin_max := -(w1*((p0x - p3x)*vp2[1] - (p0y - p3y)*((p1x*p2y - p1y*p2x)/(p1y - p2y) + vp2[0])) - (p0x*p3y - p0y*p3x)*((p1x*p2y - p1y*p2x)/(p1y - p2y) + vp2[0]) + (p0x - p3x)*(p1x*p2y - p1y*p2x)*vp2[1]/(p1y - p2y))/(w1*(p3x - p0x + (p1x - p2x)*(p0y - p3y)/(p1y - p2y)) + (vp2[0] - (p1x - p2x)*vp2[1]/(p1y - p2y))*(p0x - p3x) + (p1x - p2x)*(p0x*p3y - p0y*p3x)/(p1y - p2y))
origin_max2 := -(h1*((p0x - p3x)*vp2[1] - (p0y - p3y)*((p1x*p2y - p1y*p2x)/(p1y - p2y) + vp2[0])) - (p0x*p3y - p0y*p3x)*vp2[1] + (p0y - p3y)*(p1x*p2y - p1y*p2x)*vp2[1]/(p1y - p2y))/(h1*(p3x - p0x + (p1x - p2x)*(p0y - p3y)/(p1y - p2y)) + (vp2[0] - (p1x - p2x)*vp2[1]/(p1y - p2y))*(p0y - p3y) + p0x*p3y - p0y*p3x)
origin_min := ((p0x*p3y - p0y*p3x)*vp2[1] - (p0y - p3y)*(p1x*p2y - p1y*p2x)*vp2[1]/(p1y - p2y))/((vp2[0] - (p1x - p2x)*vp2[1]/(p1y - p2y))*(p0y - p3y) + p0x*p3y - p0y*p3x)
origin_min2 := ((p0x*p3y - p0y*p3x)*((p1x*p2y - p1y*p2x)/(p1y - p2y) + vp2[0]) - (p0x - p3x)*(p1x*p2y - p1y*p2x)*vp2[1]/(p1y - p2y))/((vp2[0] - (p1x - p2x)*vp2[1]/(p1y - p2y))*(p0x - p3x) + (p1x - p2x)*(p0x*p3y - p0y*p3x)/(p1y - p2y))
# y1 | y2
0 < origin < h1
0 < origin + lenght < h1
lenght1(origin) := -((p0x*p3y - p0y*p3x)*((origin*p1x - origin*p2x - p1x*p2y + p1y*p2x)/(p1y - p2y) - vp2[0]) + (p0x - p3x)*(origin*vp2[0] - vp2[1]*(origin*p1x - origin*p2x - p1x*p2y + p1y*p2x)/(p1y - p2y)) + w1*((p0y - p3y)*((origin*p1x - origin*p2x - p1x*p2y + p1y*p2x)/(p1y - p2y) - vp2[0]) - (p0x - p3x)*(origin - vp2[1])))/(w1*(p3x - p0x + (p1x - p2x)*(p0y - p3y)/(p1y - p2y)) + (vp2[0] - (p1x - p2x)*vp2[1]/(p1y - p2y))*(p0x - p3x) + (p1x - p2x)*(p0x*p3y - p0y*p3x)/(p1y - p2y))
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# ответ должен не заходить за область h\w :
w = 1918
len2LOW(origin) = -2783.05
origin_min = -47.2235
origin_max = 1262.85
l_max_p3x(origin) = 662.853
h = 958
len2UP(origin) = 457.283  # v
origin_min2 = -129.547
origin_max2 = 902.16
l_min_p3x(origin) = -729.547
l_max_p3y(origin) = 302.16  # v
lenght1(origin) = 662.853
l_min_p3y(origin) = -647.223
# ___________________________________________________________________________________________________________________________________
y1 := 0 + origin
y2 := y1 + lenght
x1 := -(p1x*p2y - p1y*p2x - p1x*y1 + p2x*y1)/(p1y - p2y)
x2 := -(p1x*p2y - p1y*p2x - p1x*y2 + p2x*y2)/(p1y - p2y)
vp2 = [-33423.5; 1408.69]
vp1 = [2070.58; 1408.69]
l2_real := transpose([x1, x2; y1, y2])
l2_real = [1604.38, 600; 1778.57, 902.16]
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vp2 = [-33423.5; 1408.69]
vps := transpose([vp1[0], vp2[0]; vp1[1], vp2[1]])
vps = [2070.58, 1408.69; -33423.5, 1408.69]
p0 := intersect2lines(vp2[0], vp2[1], x1, y1, p0x, p0y, p3x, p3y)
p3 := intersect2lines(vp2[0], vp2[1], x2, y2, p0x, p0y, p3x, p3y)
l1_real := transpose([p0[0], x1, x2, p3[0]; p0[1], y1, y2, p3[1]])
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w = 1918
h = 958
