h := 514
w := 960
p0x := 230
p1x := 654
p2x := 513
p3x := 215
[33; h - 133]
p0y := h - 239
p1y := h - 500
p2y := h - 70
p3y := h - 16
delta := 50
vit_rads := 12*π/180
plate_vit := [33; h - 133]
l := 15
trash_x := 50
trash := 354.309
intersect2lines(x1, y1, x2, y2, x3, y3, x4, y4) := a ← [
    ((x2*y1 - x1*y2)*(x4 - x3) - (x4*y3 - x3*y4)*(x2 - x1))/((x2 - x1)*(y4 - y3) - (x4 - x3)*(y2 - y1));
    ((x2*y1 - x1*y2)*(y4 - y3) - (x4*y3 - x3*y4)*(y2 - y1))/((x2 - x1)*(y4 - y3) - (x4 - x3)*(y2 - y1))
]
vp1 := intersect2lines(p0x, p0y, p3x, p3y, p1x, p1y, p2x, p2y)
vp1 = [142.664; 1573.39]
l1(d) := (d - p0x)*(p3y - p0y)/(p3x - p0x) + p0y
l2(d) := (d - p2x)*(p1y - p2y)/(p1x - p2x) + p2y
origin := transpose([((-p0y)*(p3x - p0x))/(p3y - p0y) + p0x, 0; 0, 0])
origin = [248.498, 0; 0, 0]
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plate_vit_x := plate_vit[0]
plate_vit_y := plate_vit[1]
gamma := vit_rads
vp2_x := (l*plate_vit_x*(plate_vit_y - plate_vit_x + l*(2*sin(gamma/2)^2 - 1) + l*sin(gamma)) + l^2*((p0y - p3y)*(p1x*p2y - p1y*p2x) - (p1y - p2y)*(p0x*p3y - p0y*p3x))*(2*sin(gamma/2)^2 - 1)/((p0x - p3x)*(p1y - p2y) - (p1x - p2x)*(p0y - p3y)))/(l*(plate_vit_y - plate_vit_x + l*sin(gamma)))
origin := [((-p0y)*(p3x - p0x))/(p3y - p0y) + p0x; 0]
vp2_y := -((p0y - p3y)*(p1x*p2y - p1y*p2x) - (p1y - p2y)*(p0x*p3y - p0y*p3x))/((p0x - p3x)*(p1y - p2y) - (p1x - p2x)*(p0y - p3y))
vp2 := [
    (15*(plate_vit[0] - (plate_vit[0] + l*cos(vit_rads)))*(-((p0y - p3y)*(p1x*p2y - p1y*p2x) - (p1y - p2y)*(p0x*p3y - p0y*p3x))/((p0x - p3x)*(p1y - p2y) - (p1x - p2x)*(p0y - p3y))) - (15*plate_vit[0]*plate_vit[1] + l*sin(vit_rads)) + 15*plate_vit[1]*plate_vit[0] + l*cos(vit_rads))/(15*plate_vit[1] - (15*plate_vit[1] + l*sin(vit_rads)));
    15*(plate_vit[1] - (plate_vit[1] + l*sin(vit_rads)))*(-((p0y - p3y)*(p1x*p2y - p1y*p2x) - (p1y - p2y)*(p0x*p3y - p0y*p3x))/((p0x - p3x)*(p1y - p2y) - (p1x - p2x)*(p0y - p3y)))/(15*plate_vit[1] - (15*plate_vit[1] + l*sin(vit_rads)))
]
vp2111111 := [vp2_x; vp2_y]
# проверка на выход за пределы кадра :
vp2 = [111030; 23600.9]
w1 := w - delta
h1 := h - delta
trash_x > (p0x*p3y - p0y*p3x)/(p0x - p3x)
trash_x < (p0x*p3y - p0y*p3x + p0y*w1 - p3y*w1)/(p0x - p3x)
t1_1 := (p0x*p3y - p0y*p3x)/(p0x - p3x)
t2_1 := (p0x*p3y - p0y*p3x + p0y*w1 - p3y*w1)/(p0x - p3x)
t2_2 := h1
t2_1 := 0
t3_2 := -(h1*((p1x - p2x)*vp2[1] - (p1y - p2y)*(p0y*vp2[0] - p3y*vp2[0] + p0x*p3y - p0y*p3x)/(p0y - p3y)) - (p1x*p2y - p1y*p2x)*vp2[1] + (p1y - p2y)*(p0x*p3y - p0y*p3x)*vp2[1]/(p0y - p3y))/(h1*(p2x - p1x + (p0x - p3x)*(p1y - p2y)/(p0y - p3y)) + (vp2[0] - (p0x - p3x)*vp2[1]/(p0y - p3y))*(p1y - p2y) + p1x*p2y - p1y*p2x)
t3_1 := ((p1x*p2y - p1y*p2x)*vp2[1] - (p1y - p2y)*(p0x*p3y - p0y*p3x)*vp2[1]/(p0y - p3y))/((vp2[0] - (p0x - p3x)*vp2[1]/(p0y - p3y))*(p1y - p2y) + p1x*p2y - p1y*p2x)
t4_1 := ((p1x*p2y - p1y*p2x)*(p0y*vp2[0] - p3y*vp2[0] + p0x*p3y - p0y*p3x)/(p0y - p3y) - (p1x - p2x)*(p0x*p3y - p0y*p3x)*vp2[1]/(p0y - p3y))/((vp2[0] - (p0x - p3x)*vp2[1]/(p0y - p3y))*(p1x - p2x) + (p0x - p3x)*(p1x*p2y - p1y*p2x)/(p0y - p3y))
t4_2 := -(w1*((p1x - p2x)*vp2[1] - (p1y - p2y)*(p0y*vp2[0] - p3y*vp2[0] + p0x*p3y - p0y*p3x)/(p0y - p3y)) - (p1x*p2y - p1y*p2x)*(p0y*vp2[0] - p3y*vp2[0] + p0x*p3y - p0y*p3x)/(p0y - p3y) + (p1x - p2x)*(p0x*p3y - p0y*p3x)*vp2[1]/(p0y - p3y))/(w1*(p2x - p1x + (p0x - p3x)*(p1y - p2y)/(p0y - p3y)) + (vp2[0] - (p0x - p3x)*vp2[1]/(p0y - p3y))*(p1x - p2x) + (p0x - p3x)*(p1x*p2y - p1y*p2x)/(p0y - p3y))
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trash2_UP(trash_x) := -((trash_x*vp2[0] + vp2[1]*(p0x*p3y - p0y*p3x - p0x*trash_x + p3x*trash_x)/(p0y - p3y))*(p1y - p2y) + (p1x*p2y - p1y*p2x)*(trash_x - vp2[1]) - h1*((p1x - p2x)*(trash_x - vp2[1]) + (p1y - p2y)*(p0y*vp2[0] - p3y*vp2[0] + p0x*p3y - p0y*p3x - p0x*trash_x + p3x*trash_x)/(p0y - p3y)))/(h1*(p2x - p1x + (p0x - p3x)*(p1y - p2y)/(p0y - p3y)) + (vp2[0] - (p0x - p3x)*vp2[1]/(p0y - p3y))*(p1y - p2y) + p1x*p2y - p1y*p2x)
# ответ должен не заходить за область h\w :
trash2_UP(trash_x) = 354.309  # V
trash2_UP(h1) = -59.691
w = 960
h = 514
h1 = 464
# _________________________________________________________________________________________________________________________________________________
y0 := 0 + trash_x
y0 = 50
x0 := (y0 - p0y)*(p3x - p0x)/(p3y - p0y) + p0x
x0 = 245.135
y3 := y0 + trash
y3 := (trash_x + trash)
x3 := (y3 - p0y)*(p3x - p0x)/(p3y - p0y) + p0x
x2 == (y2 - p0y)*(p3x - p0x)/(p3y - p0y) + p0x
y3 = 404.309
gamma := vit_rads
y2 == (x2 - p0x)*(p3y - p0y)/(p3x - p0x) + p0y
x3 = 221.302
l1_real := transpose([x0, x3; y0, y3])
l1_real = [245.135, 50; 221.302, 404.309]
p0 := [x0; y0]
p3 := [x3; y3]
plate_vit_2 := [plate_vit[0] + l*cos(gamma); plate_vit[1] + l*sin(gamma)]
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p0 = [245.135; 50]
vp2 := intersect2lines(0, vp1[1], 15, vp1[1], plate_vit[0], plate_vit[1], plate_vit_2[0], plate_vit_2[1])
p3 = [221.302; 404.309]
vp2 = [5642.77; 1573.39]
vp1[1] = 1573.39
vp1 = [142.664; 1573.39]
vp2[1] = 1573.39
vps := transpose([vp1[0], vp2[0]; vp1[1], vp2[1]])
vps = [142.664, 1573.39; 5642.77, 1573.39]
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p1 := intersect2lines(vp2[0], vp2[1], x0, y0, p2x, p2y, p1x, p1y)
p1 = [608.562; 152.571]
p2 := intersect2lines(vp2[0], vp2[1], x3, y3, p2x, p2y, p1x, p1y)
l2_real := transpose([p1[0], p2[0]; p1[1], p2[1]])
p2 = [505.892; 465.678]
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w = 960
h = 514
l2_real = [608.562, 152.571; 505.892, 465.678]
l1_real = [245.135, 50; 221.302, 404.309]
rect := transpose([x0, p1[0], p2[0], x3; h - y0, h - p1[1], h - p2[1], h - y3])
rect = [245.135, 464; 608.562, 361.429; 505.892, 48.3221; 221.302, 109.691]
l2_real = [608.562, 152.571; 505.892, 465.678]
w = 960
rect = [245.135, 464; 608.562, 361.429; 505.892, 48.3221; 221.302, 109.691]
h = 514
vp2 = [5642.77; 1573.39]
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vp1 = [142.664; 1573.39]
